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/COM,ANSYS RELEASE 2019 R1           BUILD 19.3      UP20181204       11:22:24
qw
/COM,ANSYS RELEASE 2019 R1           BUILD 19.3      UP20181204       11:22:28
qw
/COM,ANSYS RELEASE 2019 R1           BUILD 19.3      UP20181204       11:22:35
qw
/COM,ANSYS RELEASE 2019 R1           BUILD 19.3      UP20181204       11:22:38
qw
/COM,ANSYS RELEASE 2019 R1           BUILD 19.3      UP20181204       11:22:44
qw
/COM,ANSYS RELEASE 2019 R1           BUILD 19.3      UP20181204       11:23:13
qw
/COM,ANSYS RELEASE 2019 R1           BUILD 19.3      UP20181204       11:23:29
qw
/COM,ANSYS RELEASE 2019 R1           BUILD 19.3      UP20181204       11:23:47
qw
/COM,ANSYS RELEASE 2019 R1           BUILD 19.3      UP20181204       11:24:11
qw
/COM,ANSYS RELEASE 2019 R1           BUILD 19.3      UP20181204       11:24:49
EPLOT
qw
finish
/clear
/COM,ANSYS RELEASE 2019 R1           BUILD 19.3      UP20181204       03:20:09
/input,start,ans,'C:\Program Files\ANSYS Inc\ANSYS Student\v193\ANSYS\apdl\'
/prep7
! Model dimensions
*SET,W,100             !--- WIDTH OF MODEL
*SET,H,200             !--- HEIGHT OF MODEL
*SET,a,W/11*3              !--- CRACK LENGTH
! applied load
*SET,PRES,1 ! MPa
! Material model
*SET,E,2.0e5          !--- YOUNG MODULUS
*SET,NU,0.25           !--- POISSON'S RATIO
*SET,RO,1.0           !--- DENSITY
*SET,PI,ACOS(-1)
! Paris Law Constants
*SET,C,7E-8
*SET,M , 2.1
! element types
et,1,182
! Continuum material behavior
mp, ex,   1, E
mp, nuxy,  1, NU
mp, dens, 1, R0
! Fatigue crack growth Law Specification
tb, cgcr, 2, , , PARIS
tbdata, 1, C, M
! define rectangular area
blc4, 0.0, 0.0, W, H, 0
! mesh the area
type, 1
mat, 1
lesize, 1 , , , 11
lesize, 2 , , , H/W*11+1
mshkey,1
amesh, 1
! выбрали область для наличия трещины
*SET,teta , 0
! Element component for XFENRICH command
esel,s,cent,x,0, W
esel,r,cent,y,H/2-1.5*a,H/2+1.5*a
cm, testcmp, elem
allsel
! define keypoints for crack surface
k, 11, W/2-a/2*cos(teta/180*pi), H/2-a/2*sin(teta/180*pi)
k, 12, W/2+a/2*cos(teta/180*pi), H/2+a/2*sin(teta/180*pi)
l, 11,12
LPLOT
EPLOT
! mesh the crack surface with MESH200 elements
et, 2, 200, 0 ! keyopt(1) = 0 to generate line meshes
type,2
mat, 2
lsel,s,loc,x,W/2
lsel,r,loc,y,H/2
lmesh,all
allsel
LPLOT
qw
